// SBML level 3 version 1

model antiporter_1_1_cycle1()
  // model units - substance: substance, time: time_unit, volume: volume, area: area, length: length, extent: extent

  // Compartments:
  compartment default_compartment = 1;

  // Species:
  species $conc_H_out in default_compartment = conc_H_out_0;
  species $conc_S_out in default_compartment = conc_S_out_0;
  species conc_H_in in default_compartment = conc_H_in_0;
  species conc_S_in in default_compartment = conc_S_in_0;
  species conc_OF in default_compartment = conc_transporters_lipo_0;
  species conc_OF_Hb in default_compartment = 0;
  species conc_IF_Hb in default_compartment = 0;
  species conc_IF_Hb_Sb in default_compartment = 0;
  species conc_IF_Sb in default_compartment = 0;
  species conc_OF_Sb in default_compartment = 0;
  species conc_OF_Hb_Sb in default_compartment = 0;

  // Parameters:
  elem_charge = 1.602e-19;
  N_av = 6.022e23;
  F = 96485;
  R = 8.314;
  T = 298.15;
  n_liposomes = 100000000000;
  multimeric_state = 2;
  V_scale = 1;
  v_out_tot = 7e-5;
  v_m_tot = 1.9e-8;
  v_in_tot = 7e-8;
  conc_H_out_0 = 1e-7;
  conc_S_out_0 = 0.001;
  conc_H_in_0 = 1e-7;
  conc_S_in_0 = 0.001;
  k1_f_0 = 10000000000;
  k1_r_0 = 1000;
  k2_f_0 = 100;
  k2_r_0 = 100;
  k3_f_0 = 10000000;
  k3_r_0 = 1000;
  k4_f_0 = 1000;
  k4_r_0 = 10000000000;
  k5_f_0 = 100;
  k5_r_0 = 100;
  k6_f_0 = 1000;
  k7_f_0 = 10000000000;
  k8_f_0 = 1000;
  k8_r_0 = 10000000;
  eps1_f = 0;
  eps1_r = 0;
  eps2_f = 0;
  eps2_r = 0;
  eps3_f = 0;
  eps3_r = 0;
  eps4_f = 1;
  eps4_r = -1;
  eps5_f = 0;
  eps5_r = 0;
  eps6_f = 0;
  eps6_r = 0;
  eps7_f = 0;
  eps7_r = 0;
  eps8_f = 0;
  eps8_r = 0;
  Q_t_per_liposome = 0;

  // Assignment rules:
  n_transporters := 10000000000000/multimeric_state;
  C_m_per_liposome := 2.3561925e-16;
  n_transporters_per_liposome := n_transporters/n_liposomes;
  C_m_tot := C_m_per_liposome*n_liposomes;
  v_out_lipo := v_out_tot/n_liposomes;
  v_m_lipo := v_m_tot/n_liposomes;
  v_in_lipo := v_in_tot/n_liposomes;
  mol_transporters_tot_0 := n_transporters/N_av;
  mol_transporters_lipo_0 := n_transporters_per_liposome/N_av;
  conc_transporters_tot_0 := mol_transporters_tot_0/v_m_tot;
  conc_transporters_lipo_0 := mol_transporters_lipo_0/v_m_lipo;
  k1_f := k1_f_0*k1_f_v;
  k1_r := k1_r_0*k1_r_v;
  k2_f := k2_f_0*k2_f_v;
  k2_r := k2_r_0*k2_r_v;
  k3_f := k3_f_0*k3_f_v;
  k3_r := k3_r_0*k3_r_v;
  k4_f := k4_f_0*k4_f_v;
  k4_r := k4_r_0*k4_r_v;
  k5_f := k5_f_0*k5_f_v;
  k5_r := k5_r_0*k5_r_v;
  k6_f := k6_f_0*k6_f_v;
  k6_r := k1_f*k2_f*k3_f*k4_f*k5_f*k6_f/(k1_r*k2_r*k3_r*k4_r*k5_r);
  k7_f := k7_f_0*k7_f_v;
  k7_r := k8_f*k2_f*k3_f*k4_f*k5_f*k7_f/(k8_r*k2_r*k3_r*k4_r*k5_r);
  k8_f := k8_f_0*k8_f_v;
  k8_r := k8_r_0*k8_r_v;
  k1_f_v := exp(-eps1_f*F*V_t/(R*T));
  V_t := 0;
  k1_r_v := exp(-eps1_r*F*V_t/(R*T));
  k2_f_v := exp(-eps2_f*F*V_t/(R*T));
  k2_r_v := exp(-eps2_r*F*V_t/(R*T));
  k3_f_v := exp(-eps3_f*F*V_t/(R*T));
  k3_r_v := exp(-eps3_r*F*V_t/(R*T));
  k4_f_v := exp(-eps4_f*F*V_t/(R*T));
  k4_r_v := exp(-eps4_r*F*V_t/(R*T));
  k5_f_v := exp(-eps5_f*F*V_t/(R*T));
  k5_r_v := exp(-eps5_r*F*V_t/(R*T));
  k6_f_v := exp(-eps6_f*F*V_t/(R*T));
  k6_r_v := exp(-eps6_r*F*V_t/(R*T));
  k7_f_v := exp(-eps7_f*F*V_t/(R*T));
  k7_r_v := exp(-eps7_r*F*V_t/(R*T));
  k8_f_v := exp(-eps8_f*F*V_t/(R*T));
  k8_r_v := exp(-eps8_r*F*V_t/(R*T));
  net_molar_concentration_ion_influx := rxn4;
  I_t_per_liposome := net_molar_concentration_ion_influx*v_in_lipo*N_av*elem_charge;
  V_t_per_liposome := V_scale*Q_t_per_liposome/C_m_per_liposome;
  I_t_total := I_t_per_liposome*n_liposomes;
  Q_t_total := Q_t_per_liposome*n_liposomes;
  V_t_total := V_t_per_liposome;
  I_t := I_t_total;
  transporter_amount := (conc_OF + conc_OF_Hb + conc_OF_Sb + conc_IF_Hb + conc_IF_Sb + conc_IF_Hb_Sb)*v_m_lipo;
  H_conc_ratio := conc_H_out/conc_H_in;
  S_conc_ratio := conc_S_out/conc_S_in;

  // Rate rules:
  Q_t_per_liposome' = I_t_per_liposome;

  // Reactions:
  rxn1: conc_OF + $conc_H_out -> conc_OF_Hb; k1_f*conc_OF*conc_H_out - k1_r*conc_OF_Hb;
  rxn2: conc_OF_Hb -> conc_IF_Hb; k2_f*conc_OF_Hb - k2_r*conc_IF_Hb;
  rxn3: conc_IF_Hb + conc_S_in -> conc_IF_Hb_Sb; k3_f*conc_IF_Hb*conc_S_in - k3_r*conc_IF_Hb_Sb;
  rxn4: conc_IF_Hb_Sb -> conc_IF_Sb + conc_H_in; k4_f*conc_IF_Hb_Sb - k4_r*conc_IF_Sb*conc_H_in;
  rxn5: conc_IF_Sb -> conc_OF_Sb; k5_f*conc_IF_Sb - k5_r*conc_OF_Sb;
  rxn6: conc_OF_Sb -> conc_OF + $conc_S_out; k6_f*conc_OF_Sb - k6_r*conc_OF*conc_S_out;
  rxn7: conc_IF_Sb + $conc_H_out -> conc_OF_Hb_Sb; k7_f*conc_IF_Sb*conc_H_out - k7_r*conc_OF_Hb_Sb;
  rxn8: conc_OF_Hb_Sb -> conc_OF_Hb + $conc_S_out; k8_f*conc_OF_Hb_Sb - k8_r*conc_OF_Hb*conc_S_out;

  // Unit definitions:
  unit substance_per_volume = mole / litre;
  unit volume = litre;
  unit length = metre;
  unit area = metre^2;
  unit time_unit = second;
  unit substance = mole;
  unit extent = mole;
end
